// SBML level 3 version 1

model cell()

  // Compartments:
  compartment default_compartment = 1;

  // Species:
  species IFNb_env in default_compartment;
  species IFNa_env in default_compartment;
  species SOCS1m in default_compartment;
  species $w in default_compartment;
  species IFNb_mRNA in default_compartment;
  species IRF7Pn in default_compartment;
  species STATP2n in default_compartment;
  species STAT in default_compartment = 0.1;
  species IRF7m in default_compartment;
  species IFNa_mRNA in default_compartment;
  species TNFam in default_compartment;
  species TNFenv in default_compartment;
  species STATm in default_compartment;

  // Parameters:
  NS = r5*time^n3/(bm^n3 + time^n3);
  IC1 = (1 + sp*(NS/delta1)^n1)/(1 + (NS/delta1)^n1);
  IC2 = (1 + sv*(NS/delta2)^n2)/(1 + (NS/delta2)^n2);
  IC2ifa = (1 + 3*sv*(NS/delta2)^n2)/(1 + (NS/delta2)^n2);
  TJ = TJtot*(IFNb_env + IFNa_env)/(K3 + IFNb_env + IFNa_env)*1/(1 + K9*SOCS1m/delta);
  r5 = ;
  n3 = ;
  bm = ;
  sp = ;
  delta1 = ;
  n1 = ;
  sv = ;
  delta2 = ;
  n2 = ;
  TJtot = ;
  K3 = ;
  K9 = ;
  delta = ;
  r0 = ;
  k15 = ;
  tao1 = ;
  C = ;
  vmax2 = ;
  NA = ;
  K2 = ;
  K5 = ;
  tao3 = ;
  r3 = ;
  k8 = ;
  tao4 = ;
  k11 = ;
  k14 = ;
  tao6 = ;
  k12 = ;
  k16 = ;
  tao8 = ;
  vmax17 = ;
  K17 = ;
  r1 = ;
  rmax20 = ;
  K20 = ;
  tao9 = ;
  vmax19 = ;
  K19 = ;
  r4 = ;
  k26 = ;
  tao12 = ;
  k28 = ;
  tao13 = ;

  // Reactions:
  J1: $w -> IFNb_mRNA; (r0*IC1 + k15*IRF7Pn)*IC2 - IFNb_mRNA*ln(2)/tao1;  // modifiers: IRF7Pn
  J2: $w -> IFNb_env; 1000000000*C*vmax2/NA*IFNb_mRNA/(K2 + IFNb_mRNA);  // modifiers: IFNb_mRNA
  J3: $w -> STATP2n; K5*TJ*STAT/2/(K5 + STAT) - STATP2n*ln(2)/tao3;  // modifiers: STAT
  J4: $w -> SOCS1m; (r3*IC1 + k8*STATP2n)*IC2 - SOCS1m*ln(2)/tao4;  // modifiers: STATP2n
  J5: $w -> IRF7m; (k11*STATP2n + k14*IRF7Pn)*IC2 - IRF7m*ln(2)/tao6;  // modifiers: IRF7Pn, STATP2n
  J6: $w -> IRF7Pn; k12*IC1*IRF7m;  // modifiers: IRF7m
  J7: $w -> IFNa_mRNA; k16*IRF7Pn*IC2ifa - IFNa_mRNA*ln(2)/tao8;  // modifiers: IRF7Pn
  J8: $w -> IFNa_env; 1000000000*C*vmax17/NA*IFNa_mRNA/(K17 + IFNa_mRNA);  // modifiers: IFNa_mRNA
  J9: $w -> TNFam; (r1*IC1 + rmax20*TNFenv/(K20 + TNFenv))*IC2 - TNFam*ln(2)/tao9;  // modifiers: TNFenv
  J10: $w -> TNFenv; 1000000000*C*vmax19/NA*TNFam/(K19 + TNFam);  // modifiers: TNFam
  J11: $w -> STATm; (r4*IC1 + k26*STATP2n)*IC2 - STATm*ln(2)/tao12;  // modifiers: STATP2n
  J12: $w -> STAT; k28*STATm - STAT*ln(2)/tao13;  // modifiers: STATm
end
